# =============================================================================
# LAMMPS能量最小化输入脚本
# 由Jinja2模板引擎自动生成
# 生成时间: 2026-06-25T21:26:37.523072800
# 任务ID: 360004
# =============================================================================

# 初始化设置
units           real
atom_style      full
dimension       3
boundary        p p p

# 力场样式设置
bond_style      harmonic
angle_style     harmonic
dihedral_style  opls
improper_style  harmonic
pair_style      lj/cut/coul/long 12.0 12.0
special_bonds   lj 0.0 0.0 0.5 coul 0.0 0.0 0.5
kspace_style    pppm 1.0e-4

# 读取结构文件
read_data       system.data

# 力场参数
include         system.in.settings

# 邻居列表设置
neighbor        2.0 bin
neigh_modify    every 1 delay 0 check yes

# 热力学输出
thermo          100
thermo_style    custom step temp pe ke etotal press vol

# 最小化设置
# 使用最速下降法（sd），比共轭梯度法（cg）在复杂势能面上更稳健
min_style       sd
minimize        0.0001 10.0 150000 20000

# 输出最小化后的构型
write_data      minimized.data
