units           real
atom_style      full
dimension       3
boundary        p p p
bond_style      harmonic
angle_style     harmonic
dihedral_style  opls
improper_style  harmonic
pair_style      lj/cut/coul/long 12.0 12.0
special_bonds   lj 0.0 0.0 0.5 coul 0.0 0.0 0.5
kspace_style    pppm 1.0e-4
read_data       system.data
include         system.in.settings
print           "INCLUDE OK"
