# Minimal LAMMPS test - just read data file
units           real
atom_style      full
dimension       3
boundary        p p p

bond_style      harmonic
angle_style     harmonic
dihedral_style  opls
improper_style  harmonic
pair_style      lj/cut/coul/long 12.0 12.0
special_bonds   lj 0.0 0.0 0.5 coul 0.0 0.0 0.5
kspace_style    pppm 1.0e-4

read_data       system.data

print           "DATA FILE READ OK"

pair_coeff * * 0.066 3.50
bond_coeff * 268.0 1.529
angle_coeff * 50.0 109.5
dihedral_coeff * 0.0 0.0 0.278 0.0
improper_coeff * 10.0 0.0

neighbor        2.0 bin
neigh_modify    every 1 delay 0 check yes

thermo          100
min_style       fire
minimize        1.0e-2 1.0e-2 100 50

print           "MINIMAL TEST COMPLETED"
