units           real
atom_style      full
dimension       3
boundary        p p p
bond_style      harmonic
angle_style     harmonic
dihedral_style  opls
improper_style  harmonic
pair_style      lj/cut/coul/long 12.0 12.0
special_bonds   lj 0.0 0.0 0.5 coul 0.0 0.0 0.5

read_data       system.data
include         system.in.settings

kspace_style    pppm 1.0e-4
kspace_modify   grid 64 64 64

neighbor        2.0 bin
neigh_modify    every 1 delay 0 check yes

thermo          100
thermo_style    custom step temp pe ke etotal press vol

min_style       fire
minimize        1.0e-2 1.0e-2 100 50
print           "MINIMIZE OK"
