# =============================================================================
# LAMMPS Minimization Input Script
# Generated by Jinja2 template engine
# Generation time: 2026-06-26T00:26:18.263310100
# Job ID: 540001
# =============================================================================

# Initialization settings
units           real
atom_style      full
dimension       3
boundary        p p p

# Force field styles
bond_style      harmonic
angle_style     harmonic
dihedral_style  opls
improper_style  harmonic
pair_style      lj/cut/coul/long 12.0 12.0
special_bonds   lj 0.0 0.0 0.5 coul 0.0 0.0 0.5
kspace_style    pppm 1.0e-4

# Read structure file
read_data       system.data

# Force field parameters (PPPM auto-selects grid size)
include         system.in.settings

# Neighbor list settings
neighbor        2.0 bin
neigh_modify    every 1 delay 0 check yes

# Thermodynamic output
thermo          100
thermo_style    custom step temp pe ke etotal press vol

# Minimization settings - two-step strategy
# Step 1: FIRE algorithm for rapid bad contact removal (overlapping atoms)
# FIRE (Fast Inertial Relaxation Engine) handles high-energy initial configurations
min_style       fire
minimize        1.0e-4 1.0e-4 150000 20000

# Step 2: Conjugate gradient for fine convergence
# CG provides better precision once bad contacts are removed
min_style       cg
minimize        1.0e-4 10.0 150000 20000

# Output minimized configuration
write_data      minimized.data
