units           real
atom_style      full
dimension       3
boundary        p p p

bond_style      harmonic
angle_style     harmonic
dihedral_style  none
improper_style  none

pair_style      lj/cut/coul/cut 12.0 12.0
special_bonds   lj 0.0 0.0 0.5 coul 0.0 0.0 0.5
kspace_style    none

read_data       system.data
include         system.in.settings.minimal

neighbor        2.0 bin
neigh_modify    every 1 delay 0 check yes one 100000 page 1000000
thermo          100
thermo_style    custom step temp pe ke etotal press vol

timestep        0.1
min_style       fire
minimize 0.0 1.0e-6 500 10000

write_data      minimized.data
