# Two-step minimization: soft potential to resolve overlaps, then real force field
units           real
atom_style      full
dimension       3
boundary        p p p

# Step 1: Soft potential
pair_style      soft 1.0
bond_style      harmonic
angle_style     harmonic
dihedral_style  none
improper_style  none
special_bonds   lj 1.0 1.0 1.0 coul 1.0 1.0 1.0
kspace_style    none

read_data       system.data

pair_coeff      * * 10.0
include         system.in.bond_angle_only

neighbor        2.0 bin
neigh_modify    every 1 delay 0 check yes
thermo          1000
thermo_style    custom step temp pe ke etotal press vol

min_style       fire
minimize 0.0 1.0e-4 100 1000

# Reset to real force field
pair_style      lj/cut/coul/cut 12.0 12.0
pair_modify     mix geometric
special_bonds   lj 0.0 0.0 0.5 coul 0.0 0.0 0.5

include         system.in.settings.minimal

min_style       cg
minimize 0.0 1.0e-10 1 1

write_data      minimized.data
