# Soft potential minimization to resolve overlaps
units           real
atom_style      full
dimension       3
boundary        p p p

pair_style      soft 1.0
bond_style      harmonic
angle_style     harmonic
dihedral_style  none
improper_style  none
special_bonds   lj 1.0 1.0 1.0 coul 1.0 1.0 1.0
kspace_style    none

read_data       system.data

pair_coeff      * * 10.0
include         system.in.bond_angle_only

neighbor        2.0 bin
neigh_modify    every 1 delay 0 check yes
thermo          1000
thermo_style    custom step temp pe ke etotal press vol

min_style       fire
minimize 0.0 1.0e-4 100 1000

write_restart   soft.restart
