# =============================================================================
# LAMMPS Equilibrium Input Script (NVT + NPT)
# Generated by Jinja2 template engine
# Generation time: 2026-06-28T20:00:00
# Job ID: 960001
# =============================================================================

# Initialization settings
units           real
atom_style      full
dimension       3
boundary        p p p

# Force field styles (using cutoff Coulomb to handle non-neutral system charge)
# Note: The current force field assigns non-zero net charge to DMC molecules,
# making the system non-neutral. PPPM (kspace_style) requires charge neutrality,
# so we use lj/cut/coul/cut with no kspace instead of lj/cut/coul/long + pppm.
bond_style      harmonic
angle_style     harmonic
dihedral_style  none
improper_style  none
pair_style      lj/cut/coul/cut 8.0 8.0
special_bonds   lj 0.0 0.0 0.5 coul 0.0 0.0 0.5
kspace_style    none

# Read minimized configuration
read_data       minimized.data

# Force field parameters (PPPM auto-selects grid size)
include         system.in.settings

# Neighbor list settings (delay 5 to reduce overhead)
neighbor        2.0 bin
neigh_modify    every 1 delay 5 check yes

# =============================================================================
# NVE pre-equilibration: small timestep to gradually relax atom overlaps
# before switching to NVT thermostat
# =============================================================================
timestep        0.25
fix             0 all nve
run             200
unfix           0

# Reset timestep for NVT
timestep        1.0

# Velocity initialization
velocity        all create 353.0 75294 dist gaussian

# Thermodynamic output
thermo          100
thermo_style    custom step temp pe ke etotal press vol density

# Trajectory output (dump_freq from template context)
dump            1 all custom 50 dump.equilibrium.lammpstrj id mol type x y z vx vy vz

# NVT equilibration stage
timestep        1.0
fix             1 all nvt temp 353.0 353.0 100.0
run             500
unfix           1

# NPT equilibration stage
fix             2 all npt temp 353.0 353.0 100.0 iso 1.0 1.0 1000.0
run             500
unfix           2

# Output equilibrated configuration
write_data      equilibrated.data
