units real
bond_style harmonic
angle_style harmonic
dihedral_style opls
improper_style harmonic
pair_style lj/cut/coul/long 12.0 12.0
special_bonds lj 0.0 0.0 0.5 coul 0.0 0.0 0.5
units real
bond_style harmonic
angle_style harmonic
dihedral_style opls
improper_style harmonic
pair_style lj/cut/coul/long 12.0 12.0
special_bonds lj 0.0 0.0 0.5 coul 0.0 0.0 0.5
units real
bond_style harmonic
angle_style harmonic
dihedral_style opls
improper_style harmonic
pair_style lj/cut/coul/long 12.0 12.0
special_bonds lj 0.0 0.0 0.5 coul 0.0 0.0 0.5
